// COMSOL Multiphysics 6.0.0.318 model "ass-3.mph"
// Outline of the model tree

Parameters
  V_In = 0[eV]
  V_Ga = 0.697[eV]
  m_In = 0.023*me_const
  m_Ga = 0.067*me_const

Geometry
  geom1 "Geometry 1" (2D axisymmetric, length unit nm)
    r1: Rectangle | pos = {12.5, 0}; base = center; size = {25, 100}
    pol1: Polygon | source = table; table = {{0, 0}, {12, 0}, {0, 3.6}}
    r2: Rectangle | pos = {12.5, 0}; base = center; size = {25, 2}
    co1: Compose | input = pol1, r2; intbnd = off; edge = all; formula = r2+pol1
    co2: Compose | input = co1, r1; formula = r1+co1
    fin: Finalize "Form Union"

Physics
  schr: SchrodingerEquation "Schrödinger Equation" on all domains
    dependent variable psi
    meff1: EffectiveMass (default) | meffe_psi = m_In
    ve1: ElectronPotentialEnergy (default) | Ve_src = userdef; Ve = V_In
    axi1: AxialSymmetry (default)
    zflx1: ZeroFlux (default)
    init1: init "Initial Values 1" (default)
    meff2: EffectiveMass on domains 1, 3 | meffe_psi = m_Ga
    ve2: ElectronPotentialEnergy on domains 1, 3 | Ve_src = userdef; Ve = V_Ga
    open1: OpenBoundary on boundaries 2, 9 | incomingWave = 1

Mesh
  mesh1 "Mesh 1" (physics-controlled)
    size: MeshSizeDefault | hauto = 1

Studies
  std1 "Study 1"
    eigv: Eigenvalue | neigs = 4; shift = 0.1; conrad = 1

Solver configurations
  sol1 "Solution 1" (study std1)
    v1: Variables "Dependent Variables 1"
    e1: Eigenvalue "Eigenvalue Solver 1" | rtol = 1.0E-10; neigs = 4; eigref = 0.1
      dDef: Direct

Datasets
  dset1: Solution | solution = sol1

Derived values
  gev1: EvalGlobal "Eigenvalue"
    data = dset1
    expr = {schr.Ei, schr.int(2*schr.Pr*pi*R)}
    unit = {eV, 1}
    descr = {Eigenenergy, Total probability}

Plots
  pg1: PlotGroup2D "Normalized Wave Function (schr)" | data = dset1; dataisaxisym = on
    surf1: Surface "Real Part" | expr = schr.Psi_psi
      hght1: Height "Height Expression 1"
    surf2: Surface "Imaginary Part" | expr = imag(schr.Psi_psi)
      hght1: Height "Height Expression 1"
  pg2: PlotGroup2D "Probability Density (schr)" | data = dset1; dataisaxisym = on
    surf1: Surface | expr = schr.Pr
      hght1: Height "Height Expression 1"
  pg3: PlotGroup2D "Potential Energy (schr)" | data = dset1; dataisaxisym = on
    surf1: Surface | expr = schr.V_psi; unit = eV
      hght1: Height "Height Expression 1"
  pg4: PlotGroup2D "Effective Mass (schr)" | data = dset1; dataisaxisym = on
    surf1: Surface | expr = schr.meff_psiRR/me_const
      hght1: Height "Height Expression 1"