// COMSOL Multiphysics 6.0.0.318 model "ass-1.mph"
// Outline of the model tree

Parameters
  lmbd0 = 1[eV]  // Eigenvalue scale
  x0 = 0.42  // Fraction of Al in AlGaAs
  mw = 0.063*me_const  // Effective mass in well region
  mb = 0.063*0.083*x0*me_const  // Effective mass in the barrier region
  Vb = (1.247*x0)[eV]  // Potential energy in barrier
  lw = 10[nm]  // length of well
  lb = 5[nm]  // Length of barrier
  L = 3*lw+2*lb  // Length of modeling domain
  E0 = 1[eV]  // Energy for stationary study
  psi0 = 1  // Incoming wave amplitude
  Vw = 0[eV]

Geometry
  geom1 "Geometry 1" (1D, length unit nm)
    i1: Interval | specify = len; left = -L/2; len = {lw, lb, L-2*(lb+lw), lb, lw}
    fin: Finalize "Form Union"

Physics
  schr: SchrodingerEquation "Schrödinger Equation" on all domains
    dependent variable psi
    meff1: EffectiveMass (default) | meffe_psi = mw
    ve1: ElectronPotentialEnergy (default) | Ve_src = userdef; Ve = Vw
    zflx1: ZeroFlux (default)
    init1: init "Initial Values 1" (default)
    meff2: EffectiveMass on domains 2, 4 | meffe_psi = mb
    ve2: ElectronPotentialEnergy on domains 2, 4 | Ve_src = userdef; Ve = Vb
    open1: OpenBoundary on all boundaries | incomingWave = 1

Mesh
  mesh1 "Mesh 1"
    size: MeshSizeDefault | hmax = 2.68; hmin = 0.012; hcurve = 0.3; hgrad = 1.3
    edg1: Edge on remaining entities
      dis1: Distribution on all domains | numelem = 1000

Studies
  std1 "Study 1"
    eigv: Eigenvalue
      eigmethod = region
      neigs = 1
      shift = 0.22
      eigsymchk = on
      eiglr = 0.6
      eigsi = -1
      eigli = 1
      conrad = 1

Solver configurations
  sol1 "Solution 1" (study std1)
    v1: Variables "Dependent Variables 1"
    e1: Eigenvalue "Eigenvalue Solver 1" | rtol = 1.0E-10; shift = 0.22; eigref = 0.1
      dDef: Direct

Datasets
  dset1: Solution | solution = sol1

Derived values
  gev1: EvalGlobal "Eigenvalue"
    data = dset1
    table = tbl1
    expr = {schr.Ei, schr.int(schr.Pr)}
    unit = {eV, 1}
    descr = {Eigenenergy, Total probability}

Tables
  tbl1: Table
    // Eigenvalue
    Eigenvalue | Eigenenergy (eV) | Total probability (1)
    0.0156846+0.0236563i | 0.0156846+0.0236563i | 1+4.06716e-20i
    0.0156879+0.0236564i | 0.0156879+0.0236564i | 1+1.06059e-19i
    0.0309506+1.05545e-05i | 0.0309506+1.05545e-05i | 1+1.00026e-20i
    0.0587672+0.068956i | 0.0587672+0.068956i | 1-2.57293e-19i
    0.058773+0.0689494i | 0.058773+0.0689494i | 1-3.5888e-19i
    0.122061+0.000191337i | 0.122061+0.000191337i | 1+4.2615e-19i

Plots
  pg1: PlotGroup1D "Normalized Wave Function (schr)" | data = dset1
    lngr1: LineGraph "Real Part" on domains 1-5 | expr = schr.Psi_psi; xdata = expr; xdataexpr = X
    lngr2: LineGraph "Imaginary Part" on domains 1-5 | expr = imag(schr.Psi_psi); xdata = expr; xdataexpr = X
  pg2: PlotGroup1D "Potential Energy, Eigenenergy, and Wave Function (schr)"
    data = dset1
    title = Summary plot of quasi states
    xlabel = X (nm)
    ylabel = Energy(eV)
    lngr1: LineGraph "Potential Energy" on domains 1-5 | expr = schr.V_psi; unit = eV; xdata = expr; xdataexpr = X
    lngr2: LineGraph "Real Part" on domains 1-5
      expr = schr.Psi_psi*0.1[eV]/schr.plot_fac+schr.Ei
      unit = eV
      xdata = expr
      xdataexpr = X
    lngr3: LineGraph "Imaginary Part" on domains 1-5
      expr = imag(schr.Psi_psi)*0.1[eV]/schr.plot_fac+schr.Ei
      unit = eV
      xdata = expr
      xdataexpr = X
    lngr4: LineGraph "Eigenenergy" on domains 1-5 | expr = schr.Ei; unit = eV; xdata = expr; xdataexpr = X
  pg3: PlotGroup1D "Probability Density (schr)" | data = dset1
    lngr1: LineGraph on domains 1-5 | expr = schr.Pr; xdata = expr; xdataexpr = X
  pg4: PlotGroup1D "Potential Energy (schr)" | data = dset1
    lngr1: LineGraph on domains 1-5 | expr = schr.V_psi; unit = eV; xdata = expr; xdataexpr = X
  pg5: PlotGroup1D "Effective Mass (schr)" | data = dset1
    lngr1: LineGraph on domains 1-5 | expr = schr.meff_psiXX/me_const; xdata = expr; xdataexpr = X